# GÉPELEMEK I.
#
# Első házi feladat
# Vakkarimával lezárt csővég tervezése
# Fauszt András Ákos
# V04MEA
# Dr. Csobán Attila
# Tartalomjegyzék
#
# A kiadott feladat leítása
# A csővég összeállítási rajza
# A feladat célja
# Előtervezés
# Anyagválasztás
# Vakkarima vastagsága
# Tömítés erőkifejtése
# Csavarok húzószilárdsági ellenőrzése
# Csavarok csavarószilárdsági ellenőrzése
# Csavarok egyenértékű feszültségei
# Bibliográfia
# A dokumentációt és a számolásokat a PTC Mathcad Express alkalmazásban készítettem el
# A feladat célja
# A cél egy csővég megtervezése ismert 8 bar üzemi nyomással és 50 mm-es csőátmérővel.
# A csővéget egy tömítéses vakkarimával zárjuk le. A kettő közötti kapcsolatot egy átmenő
# csavarkötéssel biztosítjuk. A feladat a tömítés és a csavarkötés szilárdságtani ellenőrzése,
# illetve ezek anyagválasztása.
#
# Előtervezés
#
# A szerkezet egy hegtoldatos karimából, egy tömítésből és egy vakkarimából all, valamint az őket összefogó csavarokból.
#
# A hegtoldatos karimából a választás a DIN 2632 PN10-re esett, amely a Zetamec szabványa [1] szerint az alábbi adatokkal rendelkezik:
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# Ahol:
d_t := 102 mm
k := 125 mm
p_ü := 8 bar = 0.8 MPa
D_N := 50 mm
d_3 := 72 mm
d_2 := 18 mm
D := 165 mm
d := D_N
d_4 := 102 mm
s := 2.9 mm
# A tömítésnek a méretei, mivel a csővég karimás, ezért a méretei nD_N = 50 mm és  nd_4 = 102 mm-re választom. A vastagságot nem érdemes túl nagyra választani, mert a csavarokban hajlító erő ébred, ami nagyban növeli a tönkremenetel kockázatát.
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# A tömítést a vakkarimával szorítjuk rá a nyakra. A vakkarimát az MSZ 4582, DIN 2527 P10 [2] szabvány alapján méretezük. A vastagságát később számoljuk ki.
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# Anyagválasztás:
#
# Mielőtt elkezdhetjük a méretezést, előtte anyagot kell választani. Mivel az üzemi nyomás nem túl maga, ezért eltérhetünk a költséghatékonyság irányába.
# A karima anyagának az S235 jelű általános rendeltetésű szerkezeti acélt választom.
#
# A tömítés anyagának legcélszerűbb egy egyszerű gumi lágytömítést választani.
#
# A csavar anyagát a feszültségek kiszámolása után tudjuk megmondani.
# Az S235-ös acélnak a folyáshatára R_eH := 290 MPa
# A biztonsági tényezőt n := 1.5-re választjuk
# Vakkarima vastagsága
#
# Ekkor azt megmondhatjuk, hogy mennyi a megengedhető legnagyobb hajlító feszültség ha biztonsági tényező n = 1.5
σ_hajl := R_eH/n = 193.333 MPa
b_min := d_t/2*sqrt(3*p_ü/σ_hajl*(1 - 2*d_t/(3*k))) = 3.83712 mm
# A csavarok húzószilárdsági ellenőrzése
# A csavarokra kétféle igénybevétel hat: egy (σ_N) normál, ami a feszítő erőből származik, illetve egy csavaró feszültség (τ_t) ami a lecsavarodást akadályozza meg.
# Az ébredő feszültséget a σ_N = F_V/A_e képlettel számolhatjuk.
A_d := d^2*π/4
F_cső := p_ü*A_d = 1.5708 kN  # A vakkarimát nyomó csőerő a rögzítés révén húza a csavart
F_p := p_ü*(d_t^2 - d^2)*π/4 = 4.96623 kN  # Az üzemi nyomásból származó erő a tömítés felületén hat
# A tömítésre jellemző értékek:
# A tömítés szélessége:b_t := (D - d_4)/2 = 31.5 mm
# A tömítéseffektív szélessége:b'_t := 1.1*b_t
# Valamint a tömítés anyagát figyelembe vevő tényező: n_t := 1.5
F_t := n_t*p_ü*π*d_t*b'_t = 13.324 kN
F_ü := 1.2*(F_cső + F_p + F_t) = 23.8332 kN
# Mivel N := 4 csavarra méretezünk, így kiszámolhatjuk az előfeszítő erőt
F_V := F_ü/N = 5.95831 kN
d_e := (d_3 + d_2)/2 = 45 mm  # Ahol d_3 a magátmérő d_2a középátmérő d_e pedig az egyenértékű átmérő
A_e := d_e^2*π/4 = 1590.43 mm^2
σ_N := F_V/A_e = 3.74635 MPa  # Ahol σ_Na csavarban ébredő normál feszültség, F_V pedig az előfeszítés
# A csavarok csavarószilárdsági ellenőrzése
# A csavarkötés τ-igénybevétele a szilárdságtanból ismert képlet alapján: τ_t= M_t/I_p*r a keresztmetszetben kifelé haladva a feszültség folyamatosan nő, és a feszültségmaximum r := d_e/2 = 22.5 mm -nél van.
# A körkeresztmetszet poláris másodrendű nyomatéka I_p := d_e^4*π/32 = 402578 mm^4
# A csavarónyomaték két részből áll elő. Hat egy része a menetekben, ezt a menetemelkedés és a látszólagos súrlódási félkúpszög tangensével írhatjuk fel. Emellett hatnia kell egy savarónyomatéknak az anya alatt is, amely a becsavaráskor keletkezik, és egy anya alatti súrlódási együtthatóval írhatjuk fel.
# M_t= F_V*d_2/2*tan(α + ρ') + F_V*d_a/2*μ_a
# A menetemelkedés számítható a szabványban található adatokból [3]
# P := 2 mm
α := atan(P/(d_2*π)) = 2.02558 deg
# Az anya alatti felfekvő felületet jellemzi a d_a, amelyet felírhatunk az átmérő és a laptávolság távolságából:
d_a := (d + s)/2 = 26.45 mm
# A súrlődási tényező μ_min := 0.1valamint μ_max := 0.23
# A menetemelkedés szöge metrikus menetre: β := 60°
ρ'_min := atan(μ_min/cos(β/2)) = 6.58678 deg
ρ'_max := atan(μ_max/cos(β/2)) = 14.8733 deg
M_tmin := F_V*(d_2/2*tan(α + ρ'_min) + d_a/2*μ_min) = 16001.7 N*mm
M_tmax := F_V*(d_2/2*tan(α + ρ'_max) + d_a/2*μ_max) = 34415 N*mm
s_pe := d_e^4*π/32 = 402578 mm^4
τ_t := M_tmax/s_pe*d_e/2 = 1.92345 MPa
# Klein-diagram
# [plot: M_tmax (N*m), M_tmax*1.05 (N*m), M_tmax*0.95 (N*m), μ_min*x, μ_max*x vs x]
F_Vmin := M_tmax*0.95/(μ_max*m) = 142.149 N
F_Vmax := M_tmax*1.05/(μ_min*m) = 361.358 N
# Csavarok egyenértékű feszültségei
σ_egy := sqrt(σ_N^2 + 3*τ_t^2) = 5.01339 MPa
# Ezt kell összehasonlítani a csavar szakítószilárdságával, és az egyenletet átrendezve megkaphatjuk, hogy mennyire erős csavarra van szükségünk:
# σ_egy<σ_meg := R_eH/n = 193.333 MPa
R_eHmin := σ_egy*n = 7.52008 MPa
# Bibliográfia
#
# 1.  Zetamec szabvány PN10 karimára
# http://www.zetamec.com/din-2632-pn10_eng.htm  (2017.10.18)
# 2.  A Well Kft. szabványa
# http://www.wellkft.hu/karima_17.html  (2017.10.18)
# 3.  Tribology a metrikus menet részletes adatai
# http://www.tribology-abc.com/calculators/metric-iso.htm  (2017.10.18)
